bezier_wing from Bezier
#Mach
0.0
#iYsym  iZsym  Zsym
1  0  0.0
#Sref   Cref   Bref
2.7882  0.8938  3.1416
#Xref   Yref   Zref
0.2234  0.0  0.0

#====================================================================
SURFACE
bezier_wing
#Nchord  Cspace   Nspan  Sspace
12  1.0  40  -2.0

#-----------------------------------------------------------------
SECTION
#Xle Yle Zle   Chord   Ainc
0.0000  0.0000  0.0000  1.0000  0.00
AFILE
airfoils\bezier_section_0.dat

#-----------------------------------------------------------------
SECTION
#Xle Yle Zle   Chord   Ainc
0.0123  0.0654  0.0000  0.9987  0.00
AFILE
airfoils\bezier_section_1.dat

#-----------------------------------------------------------------
SECTION
#Xle Yle Zle   Chord   Ainc
0.0240  0.1309  0.0000  0.9951  0.00
AFILE
airfoils\bezier_section_2.dat

#-----------------------------------------------------------------
SECTION
#Xle Yle Zle   Chord   Ainc
0.0354  0.1963  0.0000  0.9894  0.00
AFILE
airfoils\bezier_section_3.dat

#-----------------------------------------------------------------
SECTION
#Xle Yle Zle   Chord   Ainc
0.0465  0.2618  0.0000  0.9817  0.00
AFILE
airfoils\bezier_section_4.dat

#-----------------------------------------------------------------
SECTION
#Xle Yle Zle   Chord   Ainc
0.0573  0.3272  0.0000  0.9724  0.00
AFILE
airfoils\bezier_section_5.dat

#-----------------------------------------------------------------
SECTION
#Xle Yle Zle   Chord   Ainc
0.0680  0.3927  0.0000  0.9617  0.00
AFILE
airfoils\bezier_section_6.dat

#-----------------------------------------------------------------
SECTION
#Xle Yle Zle   Chord   Ainc
0.0785  0.4581  0.0000  0.9498  0.00
AFILE
airfoils\bezier_section_7.dat

#-----------------------------------------------------------------
SECTION
#Xle Yle Zle   Chord   Ainc
0.0889  0.5236  0.0000  0.9370  0.00
AFILE
airfoils\bezier_section_8.dat

#-----------------------------------------------------------------
SECTION
#Xle Yle Zle   Chord   Ainc
0.0993  0.5890  0.0000  0.9235  0.00
AFILE
airfoils\bezier_section_9.dat

#-----------------------------------------------------------------
SECTION
#Xle Yle Zle   Chord   Ainc
0.1098  0.6545  0.0000  0.9096  0.00
AFILE
airfoils\bezier_section_10.dat

#-----------------------------------------------------------------
SECTION
#Xle Yle Zle   Chord   Ainc
0.1204  0.7199  0.0000  0.8954  0.00
AFILE
airfoils\bezier_section_11.dat

#-----------------------------------------------------------------
SECTION
#Xle Yle Zle   Chord   Ainc
0.1312  0.7854  0.0000  0.8813  0.00
AFILE
airfoils\bezier_section_12.dat

#-----------------------------------------------------------------
SECTION
#Xle Yle Zle   Chord   Ainc
0.1423  0.8508  0.0000  0.8674  0.00
AFILE
airfoils\bezier_section_13.dat

#-----------------------------------------------------------------
SECTION
#Xle Yle Zle   Chord   Ainc
0.1537  0.9163  0.0000  0.8540  0.00
AFILE
airfoils\bezier_section_14.dat

#-----------------------------------------------------------------
SECTION
#Xle Yle Zle   Chord   Ainc
0.1655  0.9817  0.0000  0.8413  0.00
AFILE
airfoils\bezier_section_15.dat

#-----------------------------------------------------------------
SECTION
#Xle Yle Zle   Chord   Ainc
0.1778  1.0472  0.0000  0.8296  0.00
AFILE
airfoils\bezier_section_16.dat

#-----------------------------------------------------------------
SECTION
#Xle Yle Zle   Chord   Ainc
0.1905  1.1126  0.0000  0.8192  0.00
AFILE
airfoils\bezier_section_17.dat

#-----------------------------------------------------------------
SECTION
#Xle Yle Zle   Chord   Ainc
0.2039  1.1781  0.0000  0.8102  0.00
AFILE
airfoils\bezier_section_18.dat

#-----------------------------------------------------------------
SECTION
#Xle Yle Zle   Chord   Ainc
0.2179  1.2435  0.0000  0.8028  0.00
AFILE
airfoils\bezier_section_19.dat

#-----------------------------------------------------------------
SECTION
#Xle Yle Zle   Chord   Ainc
0.2326  1.3090  0.0000  0.7975  0.00
AFILE
airfoils\bezier_section_20.dat

#-----------------------------------------------------------------
SECTION
#Xle Yle Zle   Chord   Ainc
0.2481  1.3744  0.0000  0.7942  0.00
AFILE
airfoils\bezier_section_21.dat

#-----------------------------------------------------------------
SECTION
#Xle Yle Zle   Chord   Ainc
0.2645  1.4399  0.0000  0.7934  0.00
AFILE
airfoils\bezier_section_22.dat

#-----------------------------------------------------------------
SECTION
#Xle Yle Zle   Chord   Ainc
0.2818  1.5053  0.0000  0.7953  0.00
AFILE
airfoils\bezier_section_23.dat

#-----------------------------------------------------------------
SECTION
#Xle Yle Zle   Chord   Ainc
0.3000  1.5708  0.0000  0.8000  0.00
AFILE
airfoils\bezier_section_24.dat
